*HEADING
 CFRTP residual stress (3D [0/90]) -- CRYSTALLIZATION-COUPLED VE UMAT
 Nakamura crystallization + Prony/WLF + crystallinity shift. cfrtp_cryst_umat_ve.f.
**
*NODE, NSET=NALL
 1, 0.000000e+00, 0.000000e+00, 0.000000e+00
 2, 3.333333e-03, 0.000000e+00, 0.000000e+00
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*ELEMENT, TYPE=C3D8, ELSET=EALL
 1, 1, 2, 9, 8, 36, 37, 44, 43
 2, 2, 3, 10, 9, 37, 38, 45, 44
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*ELSET, ELSET=PLY0, GENERATE
 1, 24, 1
*ELSET, ELSET=PLY90, GENERATE
 25, 48, 1
**
*ORIENTATION, NAME=ORI0, DEFINITION=COORDINATES
 1.0, 0.0, 0.0,  0.0, 1.0, 0.0
 3, 0.0
*ORIENTATION, NAME=ORI90, DEFINITION=COORDINATES
 0.0, 1.0, 0.0, -1.0, 0.0, 0.0
 3, 0.0
*SOLID SECTION, ELSET=PLY0,  MATERIAL=CFRTPX, ORIENTATION=ORI0
*SOLID SECTION, ELSET=PLY90, MATERIAL=CFRTPX, ORIENTATION=ORI90
**
*MATERIAL, NAME=CFRTPX
*DEPVAR
 23,
1, alpha, relative crystallinity
2, g_chile, stiffness fraction
3, smax, max abs sigma11
4, aT, WLF shift
5, aX, crystallinity shift
*USER MATERIAL, CONSTANTS=31
** E1 E2 E3  NU12 NU13 NU23  G12 G13
 135.0e9, 9.0e9, 9.0e9, 0.30, 0.30, 0.45, 5.0e9, 5.0e9,
** G23  A1 A2 A3  BETA  NAVRAMI KMAX TCRYST
** KMAX=16 calibrated so alpha->1 over THIS deck's cool-down (260->25,
** TCRYST=120, WCRYST=30); KMAX=3 only reached alpha~0.23 (under-crystallized).
 3.0e9, -0.3e-6, 28.0e-6, 28.0e-6, -3.0e-3, 2.5, 16.0, 120.0,
** WCRYST AGEL G0  GINF  G1 TAU1 G2 TAU2   (ginf+g1+g2+g3 = 1)
 30.0, 0.2, 0.02, 0.3, 0.4, 0.02, 0.2, 0.1,
** G3 TAU3  WLF_C1 WLF_C2 WLF_TREF(C)  BX  TMELT(C)
 0.1, 0.5, 20.0, 80.0, 140.0, 2.0, 250.0
*INITIAL CONDITIONS, TYPE=TEMPERATURE
 NALL, 260.0
*INITIAL CONDITIONS, TYPE=SOLUTION
 EALL, 1.0e-3, 0.0, 0.0, 0.0, 0.0, 0.0, 0.0, 0.0,
 0.0, 0.0, 0.0, 0.0, 0.0, 0.0, 0.0, 0.0,
 0.0, 0.0, 0.0, 0.0, 0.0, 0.0, 0.0
**
*NSET, NSET=NA
 1,
*NSET, NSET=NB
 7,
*NSET, NSET=NC
 29,
*BOUNDARY
 NA, 1, 3, 0.0
 NB, 2, 2, 0.0
 NB, 3, 3, 0.0
 NC, 1, 1, 0.0
 NC, 3, 3, 0.0
**
*AMPLITUDE, NAME=MELTCOOL, TIME=TOTAL TIME
 0.0, 260.0, 0.15, 260.0, 1.0, 25.0
*STEP, NLGEOM=NO, INC=500
*STATIC
 0.005, 1.0, 1.0e-6, 0.02
*TEMPERATURE, AMPLITUDE=MELTCOOL
 NALL, 1.0
*OUTPUT, FIELD
*ELEMENT OUTPUT
 S, E, SDV
*NODE OUTPUT
 U
*END STEP
