*HEADING
 CFRTP cure residual stress (3D [0/90]) -- THERMO-VISCOELASTIC UMAT
 CHILE + generalized-Maxwell (Prony) + WLF. cfrtp_cure_umat_ve.f.
**
*NODE, NSET=NALL
 1, 0.000000e+00, 0.000000e+00, 0.000000e+00
 2, 3.333333e-03, 0.000000e+00, 0.000000e+00
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*ELEMENT, TYPE=C3D8, ELSET=EALL
 1, 1, 2, 9, 8, 36, 37, 44, 43
 2, 2, 3, 10, 9, 37, 38, 45, 44
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*ELSET, ELSET=PLY0, GENERATE
 1, 24, 1
*ELSET, ELSET=PLY90, GENERATE
 25, 48, 1
**
*ORIENTATION, NAME=ORI0, DEFINITION=COORDINATES
 1.0, 0.0, 0.0,  0.0, 1.0, 0.0
 3, 0.0
*ORIENTATION, NAME=ORI90, DEFINITION=COORDINATES
 0.0, 1.0, 0.0, -1.0, 0.0, 0.0
 3, 0.0
*SOLID SECTION, ELSET=PLY0,  MATERIAL=CFRTPVE, ORIENTATION=ORI0
*SOLID SECTION, ELSET=PLY90, MATERIAL=CFRTPVE, ORIENTATION=ORI90
**
*MATERIAL, NAME=CFRTPVE
*DEPVAR
 22,
1, alpha, degree of cure
2, g_chile, stiffness fraction
3, smax, max abs sigma11
4, aT, WLF shift factor
*USER MATERIAL, CONSTANTS=30
** E1 E2 E3  NU12 NU13 NU23  G12 G13
 135.0e9, 9.0e9, 9.0e9, 0.30, 0.30, 0.45, 5.0e9, 5.0e9,
** G23  A1 A2 A3  BETA  AK EAK NEXP
 3.0e9, -0.3e-6, 28.0e-6, 28.0e-6, -4.0e-3, 1.0e8, 5.5e4, 1.6,
** AGEL G0 RGAS TABS  GINF  G1 TAU1 G2   (ginf+g1+g2+g3 = 1)
 0.5, 0.02, 8.314, 273.15, 0.3, 0.4, 0.02, 0.2,
** TAU2 G3 TAU3  WLF_C1 WLF_C2 WLF_TREF(C)
 0.1, 0.1, 0.5, 20.0, 80.0, 100.0
*INITIAL CONDITIONS, TYPE=TEMPERATURE
 NALL, 25.0
**
*NSET, NSET=NA
 1,
*NSET, NSET=NB
 7,
*NSET, NSET=NC
 29,
*BOUNDARY
 NA, 1, 3, 0.0
 NB, 2, 2, 0.0
 NB, 3, 3, 0.0
 NC, 1, 1, 0.0
 NC, 3, 3, 0.0
**
*AMPLITUDE, NAME=CURECYCLE, TIME=TOTAL TIME
 0.0, 25.0, 0.25, 180.0, 0.55, 180.0, 1.0, 25.0
*STEP, NLGEOM=NO, INC=500
*STATIC
 0.005, 1.0, 1.0e-6, 0.02
*TEMPERATURE, AMPLITUDE=CURECYCLE
 NALL, 1.0
*OUTPUT, FIELD
*ELEMENT OUTPUT
 S, E, SDV
*NODE OUTPUT
 U
*END STEP
