*HEADING
 CFRTP 3D mixed-mode interlaminar delamination (COH3D8 + B-K)
 Two C3D8 sublaminates + cohesive layer. Generated by gen_inp.py.
**
*NODE, NSET=NALL
 1, 0.000000e+00, 0.000000e+00, 0.000000e+00
 2, 1.500000e-03, 0.000000e+00, 0.000000e+00
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*ELEMENT, TYPE=C3D8, ELSET=BOT
 1, 1, 2, 43, 42, 165, 166, 207, 206
 2, 2, 3, 44, 43, 166, 167, 208, 207
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*ELEMENT, TYPE=C3D8, ELSET=TOP
 1000001, 329, 330, 371, 370, 493, 494, 535, 534
 1000002, 330, 331, 372, 371, 494, 495, 536, 535
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*ELEMENT, TYPE=COH3D8, ELSET=COH
 2000001, 175, 176, 217, 216, 339, 340, 381, 380
 2000002, 176, 177, 218, 217, 340, 341, 382, 381
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**
*SOLID SECTION, ELSET=BOT, MATERIAL=PLY
*SOLID SECTION, ELSET=TOP, MATERIAL=PLY
*SECTION CONTROLS, NAME=COHVISC, VISCOSITY=1.0e-5
*COHESIVE SECTION, ELSET=COH, MATERIAL=INTERFACE, RESPONSE=TRACTION SEPARATION, THICKNESS=SPECIFIED, CONTROLS=COHVISC
 1.0
**
*MATERIAL, NAME=PLY
*ELASTIC
 60.0e9, 0.30
*MATERIAL, NAME=INTERFACE
*ELASTIC, TYPE=TRACTION
 1.0e14, 1.0e14, 1.0e14
*DAMAGE INITIATION, CRITERION=QUADS
 12.0e6, 18.0e6, 18.0e6
*DAMAGE EVOLUTION, TYPE=ENERGY, MIXED MODE BEHAVIOR=BK, POWER=1.6
 200.0, 600.0, 600.0
**
*NSET, NSET=CLAMP
 41, 82, 123, 164, 205, 246, 287, 328
 369, 410, 451, 492, 533, 574, 615, 656
*NSET, NSET=TIP
 329, 370, 411, 452, 493, 534, 575, 616
*BOUNDARY
 CLAMP, 1, 3, 0.0
**
*STEP, NLGEOM=YES, INC=1000
*STATIC
 0.002, 1.0, 1.0e-8, 0.02
*BOUNDARY
 TIP, 1, 1, 3.000000e-04
 TIP, 2, 2, 0.0
 TIP, 3, 3, 5.196152e-04
*CONTROLS, ANALYSIS=DISCONTINUOUS
*OUTPUT, FIELD
*ELEMENT OUTPUT, ELSET=COH
 SDEG, STATUS
*NODE OUTPUT
 U, RF
*END STEP
