*HEADING
 CFRTP mixed-mode interlaminar delamination (2D plane strain)
 built-in cohesive (COH2D4) + Benzeggagh-Kenane. Generated by gen_inp.py.
**
*NODE, NSET=NALL
 1, 0.000000e+00, 0.000000e+00
 2, 1.000000e-03, 0.000000e+00
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*ELEMENT, TYPE=CPE4, ELSET=BOT
 1, 1, 2, 63, 62
 2, 2, 3, 64, 63
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*ELEMENT, TYPE=CPE4, ELSET=TOP
 1000001, 184, 185, 246, 245
 1000002, 185, 186, 247, 246
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*ELEMENT, TYPE=COH2D4, ELSET=COH
 2000001, 138, 139, 200, 199
 2000002, 139, 140, 201, 200
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**
*SOLID SECTION, ELSET=BOT, MATERIAL=PLY
*SOLID SECTION, ELSET=TOP, MATERIAL=PLY
*SECTION CONTROLS, NAME=COHVISC, VISCOSITY=1.0e-5
*COHESIVE SECTION, ELSET=COH, MATERIAL=INTERFACE, RESPONSE=TRACTION SEPARATION, THICKNESS=SPECIFIED, CONTROLS=COHVISC
 1.0
**
*MATERIAL, NAME=PLY
*ELASTIC
 60.0e9, 0.30
*MATERIAL, NAME=INTERFACE
*ELASTIC, TYPE=TRACTION
 1.0e14, 1.0e14, 1.0e14
*DAMAGE INITIATION, CRITERION=QUADS
 12.0e6, 18.0e6, 18.0e6
*DAMAGE EVOLUTION, TYPE=ENERGY, MIXED MODE BEHAVIOR=BK, POWER=1.6
 200.0, 600.0, 600.0
**
*NSET, NSET=CLAMP
 61, 122, 183, 244, 305, 366
*NSET, NSET=TIP
 306,
*BOUNDARY
 CLAMP, 1, 2, 0.0
**
*STEP, NLGEOM=YES, INC=1000
*STATIC
 0.002, 1.0, 1.0e-8, 0.02
*BOUNDARY
 TIP, 1, 1, 2.113091e-04
 TIP, 2, 2, 4.531539e-04
*CONTROLS, ANALYSIS=DISCONTINUOUS
*OUTPUT, FIELD
*ELEMENT OUTPUT, ELSET=COH
 SDEG, STATUS
*NODE OUTPUT
 U, RF
*END STEP
