*HEADING
 CFRTP L-bracket spring-in (real 3D FE) -- residual-stress warpage
 Hoffman-Lauritzen crystallization+VE UMAT (cfrtp_cryst_umat_hl.f).
 *** Daikin PFA-representative PLACEHOLDER props (not validated). ***
**
*NODE, NSET=NALL
 1, 4.500000e-03, -3.000000e-02, 0.000000e+00
 2, 4.500000e-03, -3.000000e-02, 6.666667e-03
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*ELEMENT, TYPE=C3D8, ELSET=EALL
 1, 1, 17, 18, 2, 5, 21, 22, 6
 2, 2, 18, 19, 3, 6, 22, 23, 7
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**
*ORIENTATION, NAME=ORI0, DEFINITION=COORDINATES
 1.0, 0.0, 0.0,  0.0, 1.0, 0.0
 3, 0.0
*SOLID SECTION, ELSET=EALL, MATERIAL=DAIKINPFA, ORIENTATION=ORI0
**
*MATERIAL, NAME=DAIKINPFA
*DEPVAR
 23,
1, alpha, relative crystallinity
2, g_chile, stiffness fraction
3, smax, max abs sigma11
4, aT, WLF shift
5, aX, crystallinity shift
*USER MATERIAL, CONSTANTS=32
** E1 E2 E3  NU12 NU13 NU23  G12 G13   (CF/PFA, matrix-dominated E2)
 120.0e9, 7.0e9, 7.0e9, 0.30, 0.30, 0.45, 3.5e9, 3.5e9,
** G23  A1 A2 A3  BETA  NAVRAMI K0[1/s] USTAR[K]  (A2=A3 HIGH fluoro CTE)
 2.4e9, -0.3e-6, 100.0e-6, 100.0e-6, -5.0e-3, 2.5, 1.0e6, 755.0,
** KG[K^2] TM0[C] TINF[C]  AGEL G0 GINF  G1 TAU1[s]   (PFA: Tm~305, Tg~90)
 2.0e5, 315.0, 60.0, 0.1, 0.01, 0.3, 0.4, 5.0,
** G2 TAU2[s] G3 TAU3[s]  WLF_C1 WLF_C2 WLF_TREF(Tg,C)  BX
 0.2, 50.0, 0.1, 500.0, 17.4, 51.6, 90.0, 2.0
*INITIAL CONDITIONS, TYPE=TEMPERATURE
 NALL, 330.0
*INITIAL CONDITIONS, TYPE=SOLUTION
 EALL, 1.0e-3, 0.0, 0.0, 0.0, 0.0, 0.0, 0.0, 0.0,
 0.0, 0.0, 0.0, 0.0, 0.0, 0.0, 0.0, 0.0,
 0.0, 0.0, 0.0, 0.0, 0.0, 0.0, 0.0
**
*NSET, NSET=NA
 1,
*NSET, NSET=NB
 13,
*NSET, NSET=NC
 17,
*NSET, NSET=A_TIP
 6,
*NSET, NSET=A_ROOT
 134,
*NSET, NSET=B_ROOT
 230,
*NSET, NSET=B_TIP
 358,
*BOUNDARY
 NA, 1, 3, 0.0
 NB, 2, 3, 0.0
 NC, 3, 3, 0.0
**
*AMPLITUDE, NAME=MELTCOOL, TIME=TOTAL TIME
 0.0, 330.0, 60.0, 330.0, 1890.0, 25.0
*STEP, NLGEOM=YES, INC=2000
*STATIC
 5.0, 1890.0, 1.0e-2, 30.0
*TEMPERATURE, AMPLITUDE=MELTCOOL
 NALL, 1.0
*OUTPUT, FIELD
*ELEMENT OUTPUT
 S, E, SDV
*NODE OUTPUT
 U
*END STEP
